** MATERIALS
**
*Material, name=QP1200
*Depvar
     2,
*User Material, constants=3208
** Young's Modulus, Poisson Ratio
190000,        0.3,          0.0,         0.0,            0.0,            0.0,         0.0,   0.
** Flow curves along 0, 45, 90 and biaxial; r-values along 0, 45 and 90
0,  436.54,  436.54,  467.49, 444.28, 0.40, 0.52, 0.36
0.00011,  591.08,  591.08,  617.67, 597.73, 0.41, 0.52, 0.37
0.0002,  647.71,  647.71,  671.05, 653.54, 0.41, 0.52, 0.37
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3,  1734.45,  1734.45,  1757.76, 1740.28, 0.83, 1.09, 0.94
*Density
 7.85e-09,
